# OpenSim document version 40000
InverseKinematicsTool slow walking02_segment_0:
  model_file: ../Models/match_markers_but_ignore_physics.osim
  marker_file: ../MarkerData/slow walking02_segment_0.trc
  output_motion_file: slow walking02_segment_0_ik_by_opensim.mot
  accuracy: 1e-5
  report_errors: true
  IKTaskSet IK_tasks:
    IKMarkerTask C7: weight=1 apply=true
    IKMarkerTask CLAV: weight=1 apply=true
    IKMarkerTask LANK: weight=1 apply=true
    IKMarkerTask LASI: weight=1 apply=true
    IKMarkerTask LBHD: weight=1 apply=true
    IKMarkerTask LELB: weight=1 apply=true
    IKMarkerTask LFHD: weight=1 apply=true
    IKMarkerTask LFIN: weight=1 apply=true
    IKMarkerTask LFRM: weight=1 apply=true
    IKMarkerTask LHEE: weight=1 apply=true
    IKMarkerTask LKNE: weight=1 apply=true
    IKMarkerTask LMT5: weight=1 apply=true
    IKMarkerTask LPSI: weight=1 apply=true
    IKMarkerTask LSHO: weight=1 apply=true
    IKMarkerTask LTHI: weight=1 apply=true
    IKMarkerTask LTIB: weight=1 apply=true
    IKMarkerTask LTOE: weight=1 apply=true
    IKMarkerTask LUPA: weight=1 apply=true
    IKMarkerTask LWRA: weight=1 apply=true
    IKMarkerTask LWRB: weight=1 apply=true
    IKMarkerTask RANK: weight=1 apply=true
    IKMarkerTask RASI: weight=1 apply=true
    IKMarkerTask RBAK: weight=1 apply=true
    IKMarkerTask RBHD: weight=1 apply=true
    IKMarkerTask RELB: weight=1 apply=true
    IKMarkerTask RFHD: weight=1 apply=true
    IKMarkerTask RFIN: weight=1 apply=true
    IKMarkerTask RFRM: weight=1 apply=true
    IKMarkerTask RHEE: weight=1 apply=true
    IKMarkerTask RKNE: weight=1 apply=true
    IKMarkerTask RMT5: weight=1 apply=true
    IKMarkerTask RPSI: weight=1 apply=true
    IKMarkerTask RSHO: weight=1 apply=true
    IKMarkerTask RTHI: weight=1 apply=true
    IKMarkerTask RTIB: weight=1 apply=true
    IKMarkerTask RTOE: weight=1 apply=true
    IKMarkerTask RUPA: weight=1 apply=true
    IKMarkerTask RWRA: weight=1 apply=true
    IKMarkerTask RWRB: weight=1 apply=true
    IKMarkerTask SACR: weight=1 apply=true
    IKMarkerTask STRN: weight=1 apply=true
    IKMarkerTask T10: weight=1 apply=true
